<?xml version="1.0"?>

<!--
      [1] - JSBSim uses the bypassratio as a measure of spool up time only.
      The MiG-21's engines were jet turbine engines, and therefore had an actual bypass ratio of 0.
      According to HAVE DOUGHNUT, page 1-8 section F, the R-11F-300 engine required 14 seconds
      to spool up from idle to milthrust. Assuming the R-13 is moderately improved, a spool up
      time of 11.5 seconds seems reasonable.
-->

<turbine_engine name="Tumansky R-13-300">
  <milthrust>       8970 </milthrust>   <!-- source: http://www.mig-21.de/english/technicaldataengines.htm -->
  <maxthrust>      14320 </maxthrust>   <!-- source: http://www.mig-21.de/english/technicaldataengines.htm -->
  <tsfc>            0.93 </tsfc>        <!-- source: wikipedia :( -->
  <atsfc>           2.09 </atsfc>       <!-- source: wikipedia :( -->
  <bleed>           0.03 </bleed>
  <idlen1>         30.0  </idlen1>      <!-- using same value as R25-300 -->
  <idlen2>         45.0  </idlen2>      <!-- using same value as R25-300 -->
  <maxn1>         103.5  </maxn1>       <!-- using same value as R25-300 -->
  <maxn2>         107.5  </maxn2>       <!-- using same value as R25-300 -->
  <augmented>         1  </augmented>
  <augmethod>         2  </augmethod>
  <injected>          0  </injected>

  <function name="N1SpoolUp">
    <table>
      <independentVar lookup="row">propulsion/engine[0]/n1</independentVar>
      <tableData>
        30  12
        50  18
        70  22
        90  26
        105 30
      </tableData>
    </table>
  </function>

  <function name="N1SpoolDown">
    <table>
      <independentVar lookup="row">propulsion/engine[0]/n1</independentVar>
      <tableData>
        30  12
        50  18
        70  22
        90  26
        105 30
      </tableData>
    </table>
  </function>

  <function name="N2SpoolUp">
    <table>
      <independentVar lookup="row">propulsion/engine[0]/n2</independentVar>
      <tableData>
        30  1.4
        50  3.1
        70  6.2
        90  11
        105 12
      </tableData>
    </table>
  </function>

  <function name="N2SpoolDown">
    <table>
      <independentVar lookup="row">propulsion/engine[0]/n2</independentVar>
      <tableData>
        30  1.4
        50  3.1
        70  6.2
        90  11
        105 12
      </tableData>
    </table>
  </function>

  <function name="IdleThrust">
   <table>
    <independentVar lookup="row">velocities/mach</independentVar>
    <independentVar lookup="column">atmosphere/density-altitude</independentVar>
    <tableData>
         -10000     0     10000   20000   30000   40000   50000   90000
     0.0  0.0430  0.0488  0.0528  0.0694  0.0899  0.1183  0.1467  0
     0.2  0.0500  0.0501  0.0335  0.0544  0.0797  0.1049  0.1342  0
     0.4  0.0040  0.0047  0.0020  0.0272  0.0595  0.0891  0.1203  0
     0.6 -0.0804 -0.0804 -0.0560 -0.0237  0.0276  0.0718  0.1073  0
     0.8 -0.2129 -0.2129 -0.1498 -0.1025  0.0474  0.0868  0.0900  0
     1.0 -0.2839 -0.2839 -0.1104 -0.0469 -0.0270  0.0552  0.0800  0
    </tableData>
   </table>
  </function>

  <function name="MilThrust">
    <product>
       <table>
        <independentVar lookup="row">velocities/mach</independentVar>
        <independentVar lookup="column">atmosphere/density-altitude</independentVar>
        <tableData>
              -10000       0   10000   20000   30000   40000   50000   60000   90000
          0.0  1.2600  1.0000  0.7400  0.5340  0.3720  0.2410  0.1490  0.0580  0
          0.2  1.1692  0.9326  0.6959  0.5052  0.3545  0.2306  0.1428  0.0399  0
          0.4  1.1465  0.9182  0.6899  0.5044  0.3559  0.2323  0.1446  0.0429  0
          0.6  1.1755  0.9466  0.7177  0.5295  0.3763  0.2469  0.1533  0.0468  0
          0.8  1.2503  1.0137  0.7772  0.5784  0.4144  0.2733  0.1690  0.0527  0
          1.0  1.3585  1.1114  0.8643  0.6460  0.4713  0.3126  0.1935  0.0625  0
          1.2  1.4713  1.2186  0.9660  0.7371  0.5400  0.3606  0.2229  0.0733  0
          1.4  1.5769  1.3256  1.0743  0.8359  0.6212  0.4194  0.2602  0.0890  0
        </tableData>
       </table>
       <max>
         <difference>
            <value>1</value>
            <abs>
              <difference>
                <property>propulsion/engine[0]/nozzle-pos-norm</property>
                <property>propulsion/engine[0]/ideal-nozzle-pos</property>
              </difference>
            </abs>
          </difference>
          <value>0.1</value>
        </max>
    </product>
  </function>

  <function name="AugThrust">
    <product>
     <table>
      <independentVar lookup="row">velocities/mach</independentVar>
      <independentVar lookup="column">atmosphere/density-altitude</independentVar>
      <tableData>
             -10000       0   10000   20000   30000   40000   50000   60000
       0.0    1.1816  1.0000  0.8184  0.6627  0.5280  0.3756  0.2327  0
       0.2    1.1308  0.9599  0.7890  0.6406  0.5116  0.3645  0.2258  0
       0.4    1.1150  0.9474  0.7798  0.6340  0.5070  0.3615  0.2240  0
       0.6    1.1284  0.9589  0.7894  0.6420  0.5134  0.3661  0.2268  0
       0.8    1.1707  0.9942  0.8177  0.6647  0.5309  0.3784  0.2345  0
       1.0    1.2411  1.0529  0.8648  0.7017  0.5596  0.3983  0.2467  0
       1.2    1.3287  1.1254  0.9221  0.7462  0.5936  0.4219  0.2614  0
       1.4    1.4365  1.2149  0.9933  0.8021  0.6360  0.4509  0.2794  0
       1.6    1.5711  1.3260  1.0809  0.8700  0.6874  0.4860  0.3011  0
       1.8    1.7301  1.4579  1.1857  0.9512  0.7495  0.5289  0.3277  0
       2.0    1.8314  1.5700  1.3086  1.0474  0.8216  0.5786  0.3585  0
       2.2    1.9700  1.6900  1.4100  1.2400  0.9100  0.6359  0.3940  0
       2.4    2.0700  1.8000  1.5300  1.3400  1.0000  0.7200  0.4600  0
       2.6    2.2000  1.9200  1.6400  1.4400  1.1000  0.8000  0.5200  0
      </tableData>
     </table>
     <max>
       <difference>
          <value>1</value>
          <abs>
            <difference>
              <property>propulsion/engine[0]/nozzle-pos-norm</property>
              <property>propulsion/engine[0]/ideal-nozzle-pos</property>
            </difference>
          </abs>
        </difference>
        <value>0.1</value>
      </max>
    </product>
  </function>

</turbine_engine>
