<?xml version="1.0"?>


<!--
      [1] - JSBSim uses the bypassratio as a measure of spool up time only.
      The MiG-21's engines were jet turbine engines, and therefore had an actual bypass ratio of 0.
      According to HAVE DOUGHNUT, page 1-8 section F, the R-11F-300 engine required 14 seconds
      to spool up from idle to milthrust. Assuming the R-25 is considerably improved, a spool up
      time of 9 seconds seems reasonable.
-->

<!--
       [2] - info gleaned from mig-21bis pilot flight operating instruction (blue cover)
-->


<turbine_engine name="Tumansky R-25-300">
  <milthrust>    9050.0 </milthrust> <!-- max milthrust, 4100 kgf per page 5, line (a) [2] -->
  <maxthrust>   15100.0 </maxthrust> <!-- max thrust without second reheat, 6850 kgf per page 5, line (a) [2] -->
  <tsfc>            0.93</tsfc> <!-- trying to match manuals wrt max distance, wikipedia says 0.96 -->
  <atsfc>           2.25</atsfc> <!-- source - wikipedia :( this is without second reheat -->
  <bleed>           0.03</bleed>
  <idlen1>         35.0 </idlen1>
  <idlen2>         50.0 </idlen2>
  <n1startrate>     1.6 </n1startrate>
  <n2startrate>     1.9 </n2startrate>
  <maxn1>         103.5 </maxn1> <!-- page 25, powerpland (in flight), line 15(b) [2] -->
  <maxn2>         107.5 </maxn2> <!-- page 25, powerpland (in flight), line 16 [2] -->
  <augmented>         1 </augmented>
  <augmethod>         2 </augmethod>
  <injected>          0 </injected>
  <injection-time> 0.0 </injection-time>

  <!-- returned value is % per second -->

  <function name="N1SpoolUp">
    <table>
      <independentVar lookup="row">propulsion/engine[0]/n1</independentVar>
      <tableData>
        30  18
        50  26
        70  35
        90  40
        105 50
      </tableData>
    </table>
  </function>

  <function name="N1SpoolDown">
    <table>
      <independentVar lookup="row">propulsion/engine[0]/n1</independentVar>
      <tableData>
        30  18
        50  24
        70  30
        90  35
        105 45
      </tableData>
    </table>
  </function>

  <function name="N2SpoolUp">
    <table>
      <independentVar lookup="row">propulsion/engine[0]/n2</independentVar>
      <tableData>
        30  1.8
        50  3.7
        70  7.2
        90  11
        105 12
      </tableData>
    </table>
  </function>

  <function name="N2SpoolDown">
    <table>
      <independentVar lookup="row">propulsion/engine[0]/n2</independentVar>
      <tableData>
        30  1.8
        50  3.7
        70  7.2
        90  11
        105 12
      </tableData>
    </table>
  </function>

  <function name="IdleThrust">
   <table>
    <independentVar lookup="row">velocities/mach</independentVar>
    <independentVar lookup="column">atmosphere/density-altitude</independentVar>
    <tableData>
         -10000     0     10000   20000   30000   40000   50000   90000
     0.0  0.0430  0.0488  0.0528  0.0694  0.0899  0.1183  0.1467  0
     0.2  0.0500  0.0501  0.0335  0.0544  0.0797  0.1049  0.1342  0
     0.4  0.0040  0.0047  0.0020  0.0272  0.0595  0.0891  0.1203  0
     0.6 -0.0804 -0.0804 -0.0560 -0.0237  0.0276  0.0718  0.1073  0
     0.8 -0.2129 -0.2129 -0.1498 -0.1025  0.0474  0.0868  0.0900  0
     1.0 -0.2839 -0.2839 -0.1104 -0.0469 -0.0270  0.0552  0.0800  0
    </tableData>
   </table>
  </function>

  <function name="MilThrust">
    <product>
       <table>
        <independentVar lookup="row">velocities/mach</independentVar>
        <independentVar lookup="column">atmosphere/density-altitude</independentVar>
        <tableData>
              -10000    0         10000     20000   30000   40000   50000   60000   90000
          0   1.2348    0.95      0.7104    0.534   0.4092  0.2892  0.1639  0.0638  0
          0.2 1.145816  0.88597   0.668064  0.5052  0.38995 0.27672 0.15708 0.04389 0
          0.4 1.12357   0.87229   0.662304  0.5044  0.39149 0.27876 0.15906 0.04719 0
          0.6 1.15199   0.89927   0.688992  0.5295  0.41393 0.29628 0.16863 0.05148 0
          0.8 1.225294  0.963015  0.746112  0.5784  0.45584 0.32796 0.1859  0.05797 0
          1.0 1.33133   1.05583   0.829728  0.646   0.51843 0.37512 0.21285 0.06875 0
          1.2 1.441874  1.15767   0.92736   0.7371  0.594   0.43272 0.24519 0.08063 0
          1.4 1.545362  1.25932   1.031328  0.8359  0.68332 0.50328 0.28622 0.0979  0

        </tableData>
       </table>

       <!-- hamper thrust if the nozzle position is off. -->
       <max>
         <difference>
            <value>1</value>
            <abs>
              <difference>
                <property>propulsion/engine[0]/nozzle-pos-norm</property>
                <property>propulsion/engine[0]/ideal-nozzle-pos</property>
              </difference>
            </abs>
          </difference>
          <value>0.1</value>
        </max>

        <!-- hamper thrust if engine is damaged -->
        <property>propulsion/engine[0]/damage-norm</property>

       <!-- if not propulsion/engine[0]/augmentation and nozzle position is open, severely hamper the mil thrust -->
       <!-- this was used prior to full engine nozzle simulation. keeping for posterity.
          <ifthen>
            <and>
                <eq>
                    <property>propulsion/engine[0]/augmentation</property>
                    <value>0</value>
                </eq>
                <eq>
                    <property>propulsion/engine[0]/nozzle-pos-norm-corrected</property>
                    <value>1</value>
                </eq>
                <gt>
                    <property>fcs/throttle-redist-mil</property>
                    <value>0.1</value>
                </gt>
            </and>
            <value>0.1</value>
            <value>1</value>
        </ifthen>-->
    </product>
  </function>

	<function name="AugThrust">
		<product>
			<table>
				<independentVar lookup="row">velocities/mach</independentVar>
				<independentVar lookup="column">atmosphere/density-altitude</independentVar>
				<tableData>
	    -10000	0.0000	10000	  20000	  30000	  40000	  50000	  60000	  70000	  80000	  90000	  100000
0.00	1.1800	1.0000	0.8200	0.6600	0.5300	0.3800	0.2700	0.2200	0.1600	0.1100	0.0600	0.0000
0.20	1.1300	0.9600	0.7900	0.6400	0.5100	0.3600	0.2500	0.2000	0.1400	0.0900	0.0400	0.0000
0.40	1.1200	0.9500	0.7800	0.6300	0.5100	0.3600	0.2400	0.1900	0.1300	0.0800	0.0300	0.0000
0.60	1.1300	0.9600	0.7900	0.6400	0.5100	0.3700	0.2600	0.2100	0.1500	0.1000	0.0400	0.0000
0.80	1.1700	0.9900	0.8200	0.6600	0.5300	0.4000	0.2900	0.2400	0.1800	0.1200	0.0500	0.0000
1.00	1.2400	1.0500	0.8600	0.7000	0.5800	0.4300	0.3200	0.2600	0.2000	0.1400	0.0500	0.0000
1.20	1.3300	1.1300	0.9200	0.7500	0.6300	0.4500	0.3400	0.2800	0.2200	0.1600	0.0600	0.0000
1.40	1.4400	1.2100	0.9900	0.8000	0.6600	0.4800	0.3700	0.3100	0.2400	0.1700	0.0600	0.0000
1.60	1.5700	1.3300	1.0800	0.8700	0.7100	0.5200	0.4000	0.3300	0.2600	0.1800	0.0700	0.0000
1.80	1.7300	1.4600	1.1900	0.9500	0.7800	0.5500	0.4400	0.3700	0.2900	0.1900	0.0800	0.0000
2.00	1.8300	1.5700	1.3100	1.0500	0.8500	0.6100	0.4700	0.3900	0.3100	0.2000	0.0900	0.0000
2.20	1.9700	1.6900	1.4100	1.2400	0.9400	0.6700	0.5000	0.4200	0.3300	0.2100	0.1000	0.0000
2.40	2.0700	1.8000	1.5300	1.3400	1.0300	0.7500	0.5500	0.4600	0.3700	0.2400	0.1200	0.0000
2.60	2.2000	1.9200	1.6400	1.4400	1.1500	0.8500	0.5900	0.5000	0.4000	0.2600	0.1400	0.0000


				</tableData>
			</table>
			<table>
				<!-- [2] -->
				<independentVar lookup="row">velocities/mach</independentVar>
				<independentVar lookup="column">atmosphere/density-altitude</independentVar>
				<independentVar lookup="table">propulsion/clr</independentVar>
				<tableData breakPoint="0">
							    0			10000		15000
					0.0		1.0			1.0			1.0
					1.0		1.0			1.0			1.0
				</tableData>
				<tableData breakPoint="1">
							-10000		0			  6000		10000		15000
					0.0		1.10		1.03		1.02		1.01		1.0
					1.0		1.54		1.46		1.33		1.04		1.0
				</tableData>
			</table>
       <!-- hamper thrust if the nozzle position is off. -->
       <max>
         <difference>
            <value>1</value>
            <abs>
              <difference>
                <property>propulsion/engine[0]/nozzle-pos-norm</property>
                <property>propulsion/engine[0]/ideal-nozzle-pos</property>
              </difference>
            </abs>
          </difference>
          <value>0.1</value>
        </max>
        <property>propulsion/engine[0]/damage-norm</property>
		</product>
	</function>


</turbine_engine>
