<?xml version="1.0"?>
<?xml-stylesheet type="text/xsl" href="http://jsbsim.sourceforge.net/JSBSim.xsl"?>

<fdm_config name="MiG-21bis" version="2.0" release="ALPHA"
   xmlns:xsi="http://www.w3.org/2001/XMLSchema-instance"
   xsi:noNamespaceSchemaLocation="http://jsbsim.sourceforge.net/JSBSim.xsd">

 <fileheader>
  <author> David Culp, Petar Jedvaj, Justin Nicholson </author>
  <filecreationdate> 26-08-2012 </filecreationdate>
  <version>1.10.0</version>
  <description> MiG-21bis </description>
 </fileheader>

 <metrics>
   <wingarea  unit="FT2">  247.50 </wingarea>
   <wingspan  unit="FT" >   23.50 </wingspan>
   <wing_incidence>          2.50 </wing_incidence>
   <chord     unit="FT" >   10.53 </chord>
   <htailarea unit="FT2">   49.50 </htailarea>
   <htailarm  unit="FT" >   20.68 </htailarm>
   <vtailarea unit="FT2">   29.70 </vtailarea>
   <vtailarm  unit="FT" >   20.68 </vtailarm>
   <location name="AERORP" unit="IN">
     <x> 0.00 </x>
     <y>   0.00 </y>
     <z>  -3.00 </z>
   </location>
   <location name="EYEPOINT" unit="M">
     <x>-3.28217 </x>
     <y>   0.00 </y>
     <z>  0.9944 </z>
   </location>
   <location name="VRP" unit="IN">
     <x>0</x>
     <y>0</y>
     <z>0</z>
   </location>
 </metrics>

 <mass_balance>
   <ixx unit="SLUG*FT2">      8500 </ixx>
   <iyy unit="SLUG*FT2">     42000 </iyy>
   <izz unit="SLUG*FT2">     35000 </izz>
   <ixy unit="SLUG*FT2">         0 </ixy>
   <ixz unit="SLUG*FT2">         0 </ixz>
   <iyz unit="SLUG*FT2">         0 </iyz>
   <emptywt unit="LBS" >     12882 </emptywt>

   <location name="CG" unit="IN">
     <x>   0.00 </x>
     <y>   0.00 </y>
     <z>  -4.00 </z>
   </location>

   <pointmass name="station1"><!-- left wing outboard pylon pointmass 0 -->
      <weight unit="LBS"> 0 </weight>
      <location name="POINTMASS" unit="IN">
          <x>   11 </x>
          <y> -120 </y>
          <z>  -10 </z>
      </location>
   </pointmass>

   <pointmass name="station2"><!-- left wing inboard pylon pointmass 1 -->
      <weight unit="LBS"> 0 </weight>
      <location name="POINTMASS" unit="IN">
          <x>    3 </x>
          <y> -100 </y>
          <z>  -10 </z>
      </location>
   </pointmass>

   <pointmass name="station3"><!-- empty centerline fuel tank pointmass 2 -->
      <weight unit="LBS"> 0 </weight>
      <location name="POINTMASS" unit="IN">
          <x>   -7 </x>
          <y>    0 </y>
          <z>  -30 </z>
      </location>
   </pointmass>

   <pointmass name="station4"><!-- right wing inboard pylon pointmass 3 -->
      <weight unit="LBS"> 0 </weight>
      <location name="POINTMASS" unit="IN">
          <x>    3 </x>
          <y>  100 </y>
          <z>  -10 </z>
      </location>
   </pointmass>

   <pointmass name="station5"><!-- right wing outboard pylon pointmass 4 -->
      <weight unit="LBS"> 0 </weight>
      <location name="POINTMASS" unit="IN">
          <x>   11 </x>
          <y>  120 </y>
          <z>  -10 </z>
      </location>
   </pointmass>
 </mass_balance>

 <ground_reactions>

  <contact type="BOGEY" name="NOSE">
   <location unit="IN">
     <x>-237 </x>
     <y>   0 </y>
     <z> -47 </z>
   </location>
   <static_friction>  0.80 </static_friction>
   <dynamic_friction> 0.50 </dynamic_friction>
   <rolling_friction> 0.02 </rolling_friction>
   <spring_coeff unit="LBS/FT">       7000.00 </spring_coeff>
   <damping_coeff unit="LBS/FT/SEC">  3500.00 </damping_coeff>
   <max_steer unit="DEG"> 65.00 </max_steer>
   <brake_group>NONE</brake_group>
   <retractable>1</retractable>
 </contact>

  <contact type="BOGEY" name="LEFT_MAIN">
   <location unit="IN">
     <x>   13.13 </x>
     <y>  -70.00 </y>
     <z>  -60.00 </z>
   </location>
   <static_friction>  0.80 </static_friction>
   <dynamic_friction> 0.50 </dynamic_friction>
   <rolling_friction> 0.026 </rolling_friction>
   <spring_coeff unit="LBS/FT">      15000.00 </spring_coeff>
   <damping_coeff unit="LBS/FT/SEC">  7200.00 </damping_coeff>
   <brake_group>LEFT</brake_group>
   <retractable>1</retractable>
 </contact>

  <contact type="BOGEY" name="RIGHT_MAIN">
   <location unit="IN">
     <x>  13.13 </x>
     <y>  70.00 </y>
     <z> -60.00 </z>
   </location>
   <static_friction>  0.80 </static_friction>
   <dynamic_friction> 0.50 </dynamic_friction>
   <rolling_friction> 0.026 </rolling_friction>
   <spring_coeff unit="LBS/FT">      15000.00 </spring_coeff>
   <damping_coeff unit="LBS/FT/SEC">  7200.00 </damping_coeff>
   <brake_group>RIGHT</brake_group>
   <retractable>1</retractable>
 </contact>

  <contact type="STRUCTURE" name="LEFT_WING">
    <location unit="M">
     <x>   2.21013 </x>
     <y> 0.01592 </y>
     <z> 3.72501 </z>
    </location>
   <static_friction>  5 </static_friction>
   <dynamic_friction> 4 </dynamic_friction>
      <spring_coeff unit="LBS/FT"> 10000 </spring_coeff>
      <damping_coeff unit="LBS/FT/SEC"> 2000 </damping_coeff>
      <damping_coeff_rebound unit="LBS/FT/SEC"> 400 </damping_coeff_rebound>
 </contact>

  <contact type="STRUCTURE" name="RIGHT_WING">
    <location unit="M">
     <x>  2.21013 </x>
     <y> 0.01592 </y>
     <z> -3.72501 </z>
    </location>
   <static_friction>  5 </static_friction>
   <dynamic_friction> 4 </dynamic_friction>
      <spring_coeff unit="LBS/FT"> 10000 </spring_coeff>
      <damping_coeff unit="LBS/FT/SEC"> 2000 </damping_coeff>
      <damping_coeff_rebound unit="LBS/FT/SEC"> 400 </damping_coeff_rebound>
 </contact>

  <contact type="STRUCTURE" name="NOSE_CONE">
    <location unit="M">
     <x> -7.18239 </x>
     <y> -0.63511 </y>
     <z>   0 </z>
    </location>
   <static_friction>  5 </static_friction>
   <dynamic_friction> 4 </dynamic_friction>
      <spring_coeff unit="LBS/FT"> 10000 </spring_coeff>
      <damping_coeff unit="LBS/FT/SEC"> 2000 </damping_coeff>
      <damping_coeff_rebound unit="LBS/FT/SEC"> 400 </damping_coeff_rebound>
 </contact>

  <contact type="STRUCTURE" name="BOT_INTAKE">
    <location unit="M">
     <x> -6.76378 </x>
     <y>  -0.25735 </y>
     <z> 0 </z>
    </location>
   <static_friction>  5 </static_friction>
   <dynamic_friction> 4 </dynamic_friction>
      <spring_coeff unit="LBS/FT"> 10000 </spring_coeff>
      <damping_coeff unit="LBS/FT/SEC"> 2000 </damping_coeff>
      <damping_coeff_rebound unit="LBS/FT/SEC"> 400 </damping_coeff_rebound>
 </contact>

  <contact type="STRUCTURE" name="LEFT_INTAKE">
    <location unit="M">
     <x> -9.81026 </x>
     <y>  0.17436 </y>
     <z> 0.42219 </z>
    </location>
   <static_friction>  5 </static_friction>
   <dynamic_friction> 4 </dynamic_friction>
      <spring_coeff unit="LBS/FT"> 10000 </spring_coeff>
      <damping_coeff unit="LBS/FT/SEC"> 2000 </damping_coeff>
      <damping_coeff_rebound unit="LBS/FT/SEC"> 400 </damping_coeff_rebound>
 </contact>

  <contact type="STRUCTURE" name="TOP_INTAKE">
    <location unit="M">
     <x> -6.82056 </x>
     <y>  0.59614 </y>
     <z> 0 </z>
    </location>
   <static_friction>  5 </static_friction>
   <dynamic_friction> 4 </dynamic_friction>
      <spring_coeff unit="LBS/FT"> 10000 </spring_coeff>
      <damping_coeff unit="LBS/FT/SEC"> 2000 </damping_coeff>
      <damping_coeff_rebound unit="LBS/FT/SEC"> 400 </damping_coeff_rebound>
 </contact>

  <contact type="STRUCTURE" name="RIGHT_INTAKE">
    <location unit="M">
     <x> -6.81026 </x>
     <y>  0.17436 </y>
     <z> -0.42164 </z>
    </location>
   <static_friction>  5 </static_friction>
   <dynamic_friction> 4 </dynamic_friction>
      <spring_coeff unit="LBS/FT"> 10000 </spring_coeff>
      <damping_coeff unit="LBS/FT/SEC"> 2000 </damping_coeff>
      <damping_coeff_rebound unit="LBS/FT/SEC"> 400 </damping_coeff_rebound>
 </contact>

  <contact type="STRUCTURE" name="TOP_INTAKE">
    <location unit="M">
     <x> -6.82056 </x>
     <y>  0.59614 </y>
     <z> 0 </z>
    </location>
   <static_friction>  5 </static_friction>
   <dynamic_friction> 4 </dynamic_friction>
      <spring_coeff unit="LBS/FT"> 10000 </spring_coeff>
      <damping_coeff unit="LBS/FT/SEC"> 2000 </damping_coeff>
      <damping_coeff_rebound unit="LBS/FT/SEC"> 400 </damping_coeff_rebound>
 </contact>

 <contact type="STRUCTURE" name="CANOPY">
    <location unit="M">
     <x> -2.89322 </x>
     <y> 0.54598 </y>
     <z> 0 </z>
    </location>
   <static_friction>  5 </static_friction>
   <dynamic_friction> 4 </dynamic_friction>
      <spring_coeff unit="LBS/FT"> 10000 </spring_coeff>
      <damping_coeff unit="LBS/FT/SEC"> 2000 </damping_coeff>
      <damping_coeff_rebound unit="LBS/FT/SEC"> 400 </damping_coeff_rebound>
 </contact>

 <contact type="STRUCTURE" name="FVSTAB">
    <location unit="M">
     <x> 5.47382 </x>
     <y> 2.71926 </y>
     <z> 0 </z>
    </location>
   <static_friction>  5 </static_friction>
   <dynamic_friction> 4 </dynamic_friction>
      <spring_coeff unit="LBS/FT"> 10000 </spring_coeff>
      <damping_coeff unit="LBS/FT/SEC"> 2000 </damping_coeff>
      <damping_coeff_rebound unit="LBS/FT/SEC"> 400 </damping_coeff_rebound>
 </contact>

 <contact type="STRUCTURE" name="RVSTAB">
    <location unit="M">
     <x> 2.577 </x>
     <y> 2.70492 </y>
     <z> 0 </z>
    </location>
   <static_friction>  5 </static_friction>
   <dynamic_friction> 4 </dynamic_friction>
      <spring_coeff unit="LBS/FT"> 10000 </spring_coeff>
      <damping_coeff unit="LBS/FT/SEC"> 2000 </damping_coeff>
      <damping_coeff_rebound unit="LBS/FT/SEC"> 400 </damping_coeff_rebound>
 </contact>

 <contact type="STRUCTURE" name="CHUTE">
    <location unit="M">
     <x> 6.67427 </x>
     <y> 6.87715 </y>
     <z> 0 </z>
    </location>
   <static_friction>  5 </static_friction>
   <dynamic_friction> 4 </dynamic_friction>
      <spring_coeff unit="LBS/FT"> 10000 </spring_coeff>
      <damping_coeff unit="LBS/FT/SEC"> 2000 </damping_coeff>
      <damping_coeff_rebound unit="LBS/FT/SEC"> 400 </damping_coeff_rebound>
 </contact>

 <contact type="STRUCTURE" name="ENGINE">
    <location unit="M">
     <x> 6.01530 </x>
     <y> -0.26876 </y>
     <z> 0 </z>
    </location>
   <static_friction>  5 </static_friction>
   <dynamic_friction> 4 </dynamic_friction>
      <spring_coeff unit="LBS/FT"> 10000 </spring_coeff>
      <damping_coeff unit="LBS/FT/SEC"> 2000 </damping_coeff>
      <damping_coeff_rebound unit="LBS/FT/SEC"> 400 </damping_coeff_rebound>
 </contact>

 <contact type="STRUCTURE" name="LHSTAB">
    <location unit="M">
     <x> 7.73271 </x>
     <y> -0.52512 </y>
     <z> 1.93036 </z>
    </location>
   <static_friction>  5 </static_friction>
   <dynamic_friction> 4 </dynamic_friction>
      <spring_coeff unit="LBS/FT"> 10000 </spring_coeff>
      <damping_coeff unit="LBS/FT/SEC"> 2000 </damping_coeff>
      <damping_coeff_rebound unit="LBS/FT/SEC"> 400 </damping_coeff_rebound>
 </contact>

 <contact type="STRUCTURE" name="RHSTAB">
    <location unit="M">
     <x> 7.73271 </x>
     <y> -0.52512 </y>
     <z> -1.93036 </z>
    </location>
   <static_friction>  5 </static_friction>
   <dynamic_friction> 4 </dynamic_friction>
      <spring_coeff unit="LBS/FT"> 10000 </spring_coeff>
      <damping_coeff unit="LBS/FT/SEC"> 2000 </damping_coeff>
      <damping_coeff_rebound unit="LBS/FT/SEC"> 400 </damping_coeff_rebound>
 </contact>

 <contact type="STRUCTURE" name="FLOWERSTAB">
    <location unit="M">
     <x> 2.68497 </x>
     <y> -0.75756 </y>
     <z> 0 </z>
    </location>
   <static_friction>  5 </static_friction>
   <dynamic_friction> 4 </dynamic_friction>
      <spring_coeff unit="LBS/FT"> 10000 </spring_coeff>
      <damping_coeff unit="LBS/FT/SEC"> 2000 </damping_coeff>
      <damping_coeff_rebound unit="LBS/FT/SEC"> 400 </damping_coeff_rebound>
 </contact>

 <contact type="STRUCTURE" name="RLOWERSTAB">
    <location unit="M">
     <x> 2.68897 </x>
     <y> -0.75756 </y>
     <z> 0 </z>
    </location>
   <static_friction>  5 </static_friction>
   <dynamic_friction> 4 </dynamic_friction>
      <spring_coeff unit="LBS/FT"> 10000 </spring_coeff>
      <damping_coeff unit="LBS/FT/SEC"> 2000 </damping_coeff>
      <damping_coeff_rebound unit="LBS/FT/SEC"> 400 </damping_coeff_rebound>
 </contact>

 <contact type="STRUCTURE" name="PITOT">
    <location unit="M">
     <x> -8.39893 </x>
     <y> 0.68879 </y>
     <z> -0.22077 </z>
    </location>
   <static_friction>  5 </static_friction>
   <dynamic_friction> 4 </dynamic_friction>
      <spring_coeff unit="LBS/FT"> 10000 </spring_coeff>
      <damping_coeff unit="LBS/FT/SEC"> 2000 </damping_coeff>
      <damping_coeff_rebound unit="LBS/FT/SEC"> 400 </damping_coeff_rebound>
 </contact>

 </ground_reactions>

 <propulsion>
   <engine file="Tumansky-R25-300">
    <location unit="IN">
      <x> 263.40 </x>
      <y>   0.00 </y>
      <z>   0.00 </z>
    </location>
    <feed>14</feed>
    <thruster file="direct">
     <location unit="IN">
       <x> 263.40 </x>
       <y>   0.00 </y>
       <z>   0.00 </z>
     </location>
     <orient unit="DEG">
       <pitch> 0.00 </pitch>
       <roll>  0.00 </roll>
       <yaw>   0.00 </yaw>
     </orient>
    </thruster>
  </engine>

  <!--
  from http://www.topedge.com/panels/aircraft/sites/kraft/fuel.htm
  cutaway to locate tanks: https://s-media-cache-ak0.pinimg.com/originals/d8/41/4a/d8414a7cafc3e42dc42b2f390e1ea563.jpg
  more source: mig-21 civil air worthiness doc, item 281.
  #1 - cutaway of fuel tanks
  #142 - port external fuel tank
  #150 - port wing integral fuel tank
  #59 - forward fuselage tank
  #63 - gravity filler
  #72 - starbord wing aft fuel tank
  #74 - starbord wing leading edge fuel tank
  #57 - external fuel tank
  #170 - port leading edge fuel tank
  #70 - dorsal tank
  #88 - rear fuselage tanks
  6 internal tanks ("group 2" is fuel tanks #1-3, "group 3" is fuel tanks #4-6)
  4 wing tanks
  3 drop tanks

  - flow -

  all the time:
  level the fuel between 1 and 2 and 7
  level the fuel between 4, 5, and 6
  fuel in 2 pumps into 3
  fuel in 3 goes straight to engine

  ventral drop tank flows into 2
  wing tanks flow into 2
  wing drop tanks flow into wing tanks as wing tanks are emptied
  #4,5,6 flow into #1
  #1,2 emptied
  #3 emptied
  -->

  	<!-- Tanks:
	0 - internal
	1 - internal
	2 - internal (Main)
	3 - internal
	4 - internal
	5 - internal
	6 - saddle (bis only)
	7 - wing 1 left front
	8 - wing 2 left rear
	9 - wing 3 right front
	10 - wing 4 right rear
	11 - ventral drop tank
	12 - left drop tank
	13 - right drop tank
	14 - accumulator (inside Main tank)

	***** FUEL AMOUNTS PER TANK ARE FICTIONAL ******* but the total fuel matches
	***** LOCATIONS ARE ESTIMATES ***** i didn't have a map of tank 1 is here, tank 2 is there. just a cutaway.
	-->

  <!-- internal fuel 1 -->
  <tank type="FUEL" number="0">
     <location unit="M">
       <x> -2.50 </x>
       <y>   0.00 </y>
       <z> 0.50 </z>
     </location>
     <priority>2</priority>
     <density>6.5</density>
     <capacity unit="LBS"> 413.6 </capacity>
     <contents unit="LBS"> 400 </contents>
     <standpipe unit="LBS"> 0 </standpipe>
  </tank>

  <tank type="FUEL" number="1">
     <location unit="M">
       <x> -1.75 </x>
       <y>   0.00 </y>
       <z> 0.50 </z>
     </location>
     <priority>2</priority>
     <density>6.5</density>
     <capacity unit="LBS"> 1267.2 </capacity>
     <contents unit="LBS"> 1200 </contents>
     <standpipe unit="LBS"> 400 </standpipe>
  </tank>

  <tank type="FUEL" number="2">
     <location unit="M">
       <x> -0.50 </x>
       <y>   0.00 </y>
       <z>  0.50 </z>
     </location>
     <priority>2</priority>
     <density>6.5</density>
     <capacity unit="LBS"> 410.4 </capacity>
     <contents unit="LBS"> 384 </contents>
     <standpipe unit="LBS"> 100 </standpipe>
  </tank>

  <tank type="FUEL" number="3">
     <location unit="M">
       <x> 0.55 </x>
       <y>   0.00 </y>
       <z>   0.45 </z>
     </location>
     <priority>2</priority>
     <density>6.5</density>
     <capacity unit="LBS"> 352 </capacity>
     <contents unit="LBS"> 330 </contents>
     <standpipe unit="LBS"> 0 </standpipe>
  </tank>

  <tank type="FUEL" number="4">
     <location unit="M">
       <x> 1.50 </x>
       <y>   0.00 </y>
       <z>   0.45 </z>
     </location>
     <priority>2</priority>
     <density>6.5</density>
     <capacity unit="LBS"> 422.4 </capacity>
     <contents unit="LBS"> 400 </contents>
     <standpipe unit="LBS"> 0 </standpipe>
  </tank>

  <tank type="FUEL" number="5">
     <location unit="M">
       <x> 2.55 </x>
       <y>   0.00 </y>
       <z> 0.45 </z>
     </location>
     <priority>2</priority>
     <density>6.5</density>
     <capacity unit="LBS"> 422.4 </capacity>
     <contents unit="LBS"> 400 </contents>
     <standpipe unit="LBS"> 0 </standpipe>
  </tank>

  <tank type="FUEL" number="6">
     <location unit="M">
       <x> -1.25 </x>
       <y>   0.00 </y>
       <z> 1.12 </z>
     </location>
     <priority>2</priority>
     <density>6.5</density>
     <capacity unit="LBS"> 1003.2 </capacity>
     <contents unit="LBS"> 950 </contents>
     <standpipe unit="LBS"> 0 </standpipe>
  </tank>

  <!-- wing tanks -->

  <tank type="FUEL" number="7">
     <location unit="M">
       <x> -0.29435 </x>
       <y>   -1.75428</y>
       <z>   0.1971 </z>
     </location>
     <priority>2</priority>
     <density>6.5</density>
     <capacity unit="LBS"> 308 </capacity>
     <contents unit="LBS"> 225 </contents>
     <standpipe unit="LBS"> 0 </standpipe>
  </tank>

  <tank type="FUEL" number="8">
     <location unit="M">
       <x> 1.09838 </x>
       <y>   -1.27481 </y>
       <z>   0.1971 </z>
     </location>
     <priority>2</priority>
     <density>6.5</density>
     <capacity unit="LBS"> 193.6 </capacity>
     <contents unit="LBS"> 100 </contents>
     <standpipe unit="LBS"> 0 </standpipe>
  </tank>

  <tank type="FUEL" number="9">
     <location unit="M">
       <x> -0.29435 </x>
       <y>   1.75428</y>
       <z>   0.1971 </z>
     </location>
     <priority>2</priority>
     <density>6.5</density>
     <capacity unit="LBS"> 308 </capacity>
     <contents unit="LBS"> 225 </contents>
     <standpipe unit="LBS"> 0 </standpipe>
  </tank>

  <tank type="FUEL" number="10">
     <location unit="M">
       <x> 1.09838 </x>
       <y>   1.27481 </y>
       <z>   0.1971 </z>
     </location>
     <priority>2</priority>
     <density>6.5</density>
     <capacity unit="LBS"> 193.6 </capacity>
     <contents unit="LBS"> 100 </contents>
     <standpipe unit="LBS"> 0 </standpipe>
  </tank>

  <!-- drop tanks -->
  <tank type="FUEL" number="11">
     <location unit="IN">
       <x>   3.00 </x>
       <y>   0.00 </y>
       <z> -30.00 </z>
     </location>
     <priority>1</priority>
     <density>6.5</density>
     <capacity unit="LBS"> 1400 </capacity>
     <contents unit="LBS"> 0 </contents>
  </tank>

  <tank type="FUEL" number="12">
     <location unit="IN">
       <x>  21.00 </x>
       <y>-120.00 </y>
       <z> -10.00 </z>
     </location>
     <density>6.5</density>
     <capacity unit="LBS"> 850 </capacity>
     <contents unit="LBS"> 0 </contents>
  </tank>

  <tank type="FUEL" number="13">
     <location unit="IN">
       <x>  21.00 </x>
       <y> 120.00 </y>
       <z> -10.00 </z>
     </location>
     <density>6.5</density>
     <capacity unit="LBS"> 850 </capacity>
     <contents unit="LBS"> 0 </contents>
  </tank>

<!-- accumulator - inside tank 3 -->

  <tank type="FUEL" number="14">
     <location unit="M">
       <x>  -0.50 </x>
       <y>   0.00 </y>
       <z>   0.50 </z>
     </location>
     <priority>1</priority>
     <density>6.5</density>
     <capacity unit="LBS"> 56 </capacity>
     <contents unit="LBS"> 56 </contents>
     <standpipe unit="LBS"> 0 </standpipe>
  </tank>


  <dump-rate unit="LBS/MIN"> 1500 </dump-rate>
 </propulsion>

 <system file="Gear"/>
 <system file="Flaps"/>
 <system file="Speedbrakes"/>
 <system file="FCS-Pitch"/>
 <system file="FCS-Roll"/>
 <system file="FCS-Yaw"/>
 <system file="Alpha-Buffet"/>
 <system file="Chute"/>
 <system file="Dump"/>
 <system file="Canopy"/>
 <system file="Particles"/>
 <system file="fuel"/>
 <system file="throttle"/>

 <flight_control name="none"/>

<aerodynamics>

        <function name="aero/function/kCDge">
            <description>Change_in_drag_due_to_ground_effect</description>
            <product>
                  <table>
                      <independentVar>aero/h_b-mac-ft</independentVar>
                      <tableData>
                          0.0000	0.0480
                          0.2000	0.5150
                          0.3000	0.6290
                          0.4000	0.7090
                          0.6000	0.8150
                          0.8000	0.8820
                          1.0000	0.9280
                          1.2000	0.9620
                          1.4000	0.9880
                          1.6000	1.0000
                      </tableData>
                  </table>
            </product>
        </function>

        <function name="aero/function/kCLge">
            <description>Change_in_lift_due_to_ground_effect</description>
            <product>
                  <table>
                      <independentVar>aero/h_b-mac-ft</independentVar>
                      <tableData>
                          0.0000	1.2030
                          0.2000	1.1270
                          0.3000	1.0900
                          0.4000	1.0730
                          0.6000	1.0460
                          0.8000	1.0550
                          1.0000	1.0190
                          1.2000	1.0130
                          1.4000	1.0080
                          1.6000	1.0060
                          1.8000	1.0030
                          2.0000	1.0020
                          2.2000	1.0000
                      </tableData>
                  </table>
            </product>
        </function>


  <axis name="LIFT">
    <function name="aero/coefficient/CLalpha">
      <description>Lift_due_to_alpha</description> -->

      <product>
          <property>aero/qbar-psf</property>
          <property>metrics/Sw-sqft</property>
          <property>aero/function/kCLge</property>
          <table>
            <independentVar lookup="row">aero/alpha-rad</independentVar>
            <tableData>
			<!-- source: http://ethesis.nitrkl.ac.in/6406/1/E-97.pdf maybe
              -0.20 -0.620
			  0.087	0.28
			  0.175	0.60
			  0.262	0.85
			  0.349	0.93
			  0.436	0.89
			  0.524	0.91
			  0.611	0.95
			  0.698	0.97
			  0.785	0.89
			  0.873	0.85
			  0.960	0.79
			  1.050	0.70
			  1.396	0.20-->
			  <!-- 0 degrees to 20 degrees: source: http://www.uotechnology.edu.iq/tec_magaz/volume272009/No.7,2009/researches/Text_11.pdf page 12 -->
			  -0.20 -0.620
			  0.000	-0.01
			  0.087	0.25
			  0.175	0.502
			  0.262	0.70
			  0.349  0.899
			  0.436	0.89
			  0.524	0.91
			  0.611	0.95
			  0.698	0.97
			  0.785	0.89
			  0.873	0.85
			  0.960	0.79
			  1.050	0.70
			  1.396	0.20

            </tableData>
          </table>
      </product>
    </function>
	<!-- table was:
			   -0.20 -0.620
               0.00  0.030
               0.26  0.880
               0.60  0.448
	-->

    <function name="aero/coefficient/dCLflap">
       <description>Delta_Lift_due_to_flaps</description>
       <product>
           <property>aero/qbar-psf</property>
           <property>metrics/Sw-sqft</property>
           <table>
             <independentVar lookup="row">fcs/flap-pos-norm</independentVar>
             <tableData>
               0.00  0.00
               0.50  0.07
               1.00  0.19
             </tableData>
           </table>
       </product>
    </function>

    <function name="aero/coefficient/CLde">
       <description>Lift_due_to_Elevator_Deflection</description>
       <product>
           <property>aero/qbar-psf</property>
           <property>metrics/Sw-sqft</property>
           <abs><property>fcs/elevator-pos-rad</property></abs>
           <value>0.2</value>
       </product>
    </function>

    <function name="aero/coefficient/buffet">
       <description>Buffet at high alpha</description>
         <product>
           <property>aero/alpha_buffet/sine_wave</property>
           <property>aero/alpha_buffet/strength</property>
         </product>
    </function>

  </axis>

  <axis name="DRAG">

    <function name="aero/coefficient/CD0">
       <description>Drag_at_zero_lift</description>
       <product>
          <property>aero/qbar-psf</property>
          <property>metrics/Sw-sqft</property>
          <table>
            <independentVar lookup="row">aero/alpha-rad</independentVar>
            <tableData>
             -1.57    1.500
             -0.26    0.025
              0.00    0.020
              0.26    0.025
              1.57    1.500
            </tableData>
          </table>
       </product>
    </function>

    <function name="aero/coefficient/CDi">
       <description>Induced_drag</description>
         <product>
           <property>aero/qbar-psf</property>
           <property>metrics/Sw-sqft</property>
           <property>aero/cl-squared</property>
           <property>aero/function/kCDge</property>
           <value>0.14</value>
         </product>
    </function>

    <function name="aero/coefficient/CDmach">
       <description>Drag_due_to_mach</description>
        <product>
          <property>aero/qbar-psf</property>
          <property>metrics/Sw-sqft</property>
          <table>
            <independentVar lookup="row">velocities/mach</independentVar>
            <tableData>
                0.00      0.000
                0.81      0.000
                1.10      0.018
                1.40      0.011
                1.80      0.005
                2.20      0.003
            </tableData>
          </table>
        </product>
    </function>

    <function name="aero/coefficient/CDflap">
       <description>Drag_due_to_flaps</description>
         <product>
           <property>aero/qbar-psf</property>
           <property>metrics/Sw-sqft</property>
           <table>
             <independentVar lookup="row">fcs/flap-pos-norm</independentVar>
             <tableData>
               0.00  0.00
               0.50  0.025
               1.00  0.08
             </tableData>
           </table>
         </product>
    </function>

    <function name="aero/coefficient/CDgear">
       <description>Drag_due_to_gear</description>
         <product>
           <property>aero/qbar-psf</property>
           <property>metrics/Sw-sqft</property>
           <property>gear/gear-pos-norm</property>
           <value>0.04</value>
         </product>
    </function>

    <function name="aero/coefficient/CDsb">
       <description>Drag_due_to_speedbrakes</description>
         <product>
           <property>aero/qbar-psf</property>
           <property>metrics/Sw-sqft</property>
           <property>fcs/speedbrake-pos-norm</property>
           <value>0.03</value>
         </product>
    </function>

    <function name="aero/coefficient/CDbeta">
       <description>Drag_due_to_sideslip</description>
       <product>
          <property>aero/qbar-psf</property>
          <property>metrics/Sw-sqft</property>
          <table>
            <independentVar lookup="row">aero/beta-rad</independentVar>
            <tableData>
              -1.57    1.230
              -0.26    0.050
               0.00    0.000
               0.26    0.050
               1.57    1.230
            </tableData>
          </table>
       </product>
    </function>

    <function name="aero/coefficient/CDde">
       <description>Drag_due_to_Elevator_Deflection</description>
       <product>
           <property>aero/qbar-psf</property>
           <property>metrics/Sw-sqft</property>
           <abs><property>fcs/elevator-pos-norm</property></abs>
           <value>0.05</value>
       </product>
    </function>

    <function name="aero/coefficient/CDbc">
       <description>Drag_due_to_braking_chute</description>
         <product>
           <property>aero/qbar-psf</property>
           <property>metrics/Sw-sqft</property>
           <property>systems/chute/unfurl-norm</property>
           <value>0.63</value>
         </product>
    </function>

  </axis>

  <axis name="SIDE">

    <function name="aero/coefficient/CYb">
       <description>Side_force_due_to_beta</description>
       <product>
           <property>aero/qbar-psf</property>
           <property>metrics/Sw-sqft</property>
           <property>aero/beta-rad</property>
           <value>-1</value>
       </product>
    </function>

  </axis>

  <axis name="ROLL">

    <function name="aero/coefficient/Clb">
       <description>Roll_moment_due_to_beta</description>
       <product>
           <property>aero/qbar-psf</property>
           <property>metrics/Sw-sqft</property>
           <property>metrics/bw-ft</property>
           <property>aero/beta-rad</property>
           <value>-0.01</value>
       </product>
    </function>

    <function name="aero/coefficient/Clp">
       <description>Roll_moment_due_to_roll_rate</description>
       <product>
           <property>aero/qbar-psf</property>
           <property>metrics/Sw-sqft</property>
           <property>metrics/bw-ft</property>
           <property>aero/bi2vel</property>
           <property>velocities/p-aero-rad_sec</property>
           <value>-0.4</value>
       </product>
    </function>

    <function name="aero/coefficient/Clr">
       <description>Roll_moment_due_to_yaw_rate</description>
       <product>
           <property>aero/qbar-psf</property>
           <property>metrics/Sw-sqft</property>
           <property>metrics/bw-ft</property>
           <property>aero/bi2vel</property>
           <property>velocities/r-aero-rad_sec</property>
           <value>0.15</value>
       </product>
    </function>

    <function name="aero/coefficient/Clda">
       <description>Roll_moment_due_to_aileron</description>
       <product>
          <property>aero/qbar-psf</property>
          <property>metrics/Sw-sqft</property>
          <property>metrics/bw-ft</property>
          <property>fcs/left-aileron-pos-rad</property>
          <table>
            <independentVar lookup="row">velocities/mach</independentVar>
            <tableData>
              0.0    0.21
              2.0    0.03
            </tableData>
          </table>
       </product>
    </function>

    <function name="aero/coefficient/Cldr">
       <description>Roll_moment_due_to_rudder</description>
       <product>
           <property>aero/qbar-psf</property>
           <property>metrics/Sw-sqft</property>
           <property>metrics/bw-ft</property>
           <property>fcs/rudder-pos-rad</property>
           <value>-0.03</value>
       </product>
    </function>

  </axis>

  <axis name="PITCH">

    <function name="aero/coefficient/Cmalpha">
       <description>Pitch_moment_due_to_alpha</description>
       <product>
           <property>aero/qbar-psf</property>
           <property>metrics/Sw-sqft</property>
           <property>metrics/cbarw-ft</property>
           <property>aero/alpha-rad</property>
           <value>-0.3</value>
       </product>
    </function>

    <function name="aero/coefficient/Cmde">
       <description>Pitch_moment_due_to_elevator</description>
       <product>
          <property>aero/qbar-psf</property>
          <property>metrics/Sw-sqft</property>
          <property>metrics/cbarw-ft</property>
          <property>fcs/elevator-pos-rad</property>
          <table>
            <independentVar lookup="row">velocities/mach</independentVar>
            <!--<tableData>
              0.0     -0.600
              2.0     -0.200
            </tableData>-->
			<tableData>
              0.0     -0.700
              2.0     -0.320
            </tableData>
          </table>
       </product>
    </function>

    <function name="aero/coefficient/Cmq">
       <description>Pitch_moment_due_to_pitch_rate</description>
       <product>
           <property>aero/qbar-psf</property>
           <property>metrics/Sw-sqft</property>
           <property>metrics/cbarw-ft</property>
           <property>aero/ci2vel</property>
           <property>velocities/q-aero-rad_sec</property>
           <value>-18</value>
       </product>
    </function>

    <function name="aero/coefficient/Cmadot">
       <description>Pitch_moment_due_to_alpha_rate</description>
       <product>
           <property>aero/qbar-psf</property>
           <property>metrics/Sw-sqft</property>
           <property>metrics/cbarw-ft</property>
           <property>aero/ci2vel</property>
           <property>aero/alphadot-rad_sec</property>
           <value>-9</value>
       </product>
    </function>

  </axis>

  <axis name="YAW">

    <function name="aero/coefficient/Cnb">
       <description>Yaw_moment_due_to_beta</description>
       <product>
           <property>aero/qbar-psf</property>
           <property>metrics/Sw-sqft</property>
           <property>metrics/bw-ft</property>
           <property>aero/beta-rad</property>
           <value>0.12</value>
       </product>
    </function>

    <function name="aero/coefficient/Cnr">
       <description>Yaw_moment_due_to_yaw_rate</description>
       <product>
           <property>aero/qbar-psf</property>
           <property>metrics/Sw-sqft</property>
           <property>metrics/bw-ft</property>
           <property>aero/bi2vel</property>
           <property>velocities/r-aero-rad_sec</property>
           <value>-0.19</value>
       </product>
    </function>

    <function name="aero/coefficient/Cndr">
       <description>Yaw_moment_due_to_rudder</description>
       <product>
           <property>aero/qbar-psf</property>
           <property>metrics/Sw-sqft</property>
           <property>metrics/bw-ft</property>
           <property>fcs/rudder-pos-rad</property>
           <value>-0.08</value>
       </product>
    </function>

  </axis>

 </aerodynamics>

</fdm_config>
